// SBML level 3 version 1

model chemotaxis()

  // Compartments:
  compartment default_compartment = 1;

  // Species:
  species $x0 in default_compartment = 1;
  species L in default_compartment = -1.400207e-23;
  species T2PR in default_compartment = -8.896706e-24;
  species T3P in default_compartment = -5.071314e-24;
  species R in default_compartment = 9.319026e-11;
  species T2R in default_compartment = 2.843965e-7;
  species T3 in default_compartment = 1.747782e-7;
  species T3PR in default_compartment = -1.317242e-25;
  species T4P in default_compartment = -1.25542e-25;
  species T3R in default_compartment = 4.025355e-9;
  species T4 in default_compartment = 2.554349e-9;
  species LT2PR in default_compartment = -2.100917e-27;
  species LT3P in default_compartment = 3.265814e-29;
  species LT2R in default_compartment = -3.716444e-24;
  species LT3 in default_compartment = -2.69623e-24;
  species LT3PR in default_compartment = 4.365755e-33;
  species LT4P in default_compartment = -1.086969e-34;
  species LT3R in default_compartment = -5.901742e-26;
  species LT4 in default_compartment = -3.770878e-26;
  species Bp in default_compartment = 6.759881e-7;
  species T2P in default_compartment = -2.227512e-22;
  species T2 in default_compartment = 7.244632e-6;
  species T4PR in default_compartment = -3.054252e-26;
  species T4R in default_compartment = 8.237069e-10;
  species LT2P in default_compartment = 1.626619e-31;
  species LT2 in default_compartment = -1.014488e-22;
  species LT4PR in default_compartment = -8.1725e-39;
  species LT4R in default_compartment = -1.277839e-26;
  species T2pR in default_compartment = 1.017013e-8;
  species T2p in default_compartment = 2.590709e-7;
  species T3pR in default_compartment = 4.318437e-10;
  species T3p in default_compartment = 1.875041e-8;
  species T4pR in default_compartment = 9.42591e-11;
  species T4p in default_compartment = 2.923017e-10;
  species LT2pR in default_compartment = 2.736993e-43;
  species LT2p in default_compartment = 0;
  species LT3pR in default_compartment = -2.321396e-27;
  species LT3p in default_compartment = -1.060484e-25;
  species LT4pR in default_compartment = -1.052745e-27;
  species LT4p in default_compartment = -3.10664e-27;
  species B in default_compartment = 1.024012e-6;
  species Yp in default_compartment = 6.045357e-6;
  species Z in default_compartment = 4e-5;
  species Y in default_compartment = 1.395464e-5;

  // Parameters:
  k0 = 0;
  k1c = 0.17;
  k2c = 0.1*k1c;
  k3c = 30*k1c;
  k4c = 30*k2c;
  k_1 = 400000;
  k_2 = 30000;
  k_3 = k_1;
  k_4 = k_2;
  k1a = 1.7e-6/k1b;
  k1b = ktuning*k5;
  k5 = 70000000;
  k_5 = 70;
  k8 = 15;
  k9 = 3*k8;
  k10 = 3.2*k8;
  k11 = 0;
  k12 = 1.1*k8;
  k13 = 0.72*k10;
  k_b = 0.35;
  k_y = 500000;
  kb = 800000;
  ky = 30000000;
  ktuning = 1;
  k2a = k1a;
  k2b = k1b;
  k3a = k1a;
  k3b = k1b;

  // Reactions:
  J0: $x0 -> L; k0*x0;
  J1_2PR: T2PR -> T3P + R; k1c*T2PR;
  J1_2R: T2R -> T3 + R; k1c*T2R;
  J1_3PR: T3PR -> T4P + R; k2c*T3PR;
  J1_3R: T3R -> T4 + R; k2c*T3R;
  J1_L2PR: LT2PR -> LT3P + R; k3c*LT2PR;
  J1_L2R: LT2R -> LT3 + R; k3c*LT2R;
  J1_L3PR: LT3PR -> LT4P + R; k4c*LT3PR;
  J1_L3R: LT3R -> LT4 + R; k4c*LT3R;
  J4a_3PR: T3PR + Bp -> T2PR + Bp; k_1*T3PR*Bp;
  J4a_3R: T3R + Bp -> T2R + Bp; k_1*T3R*Bp;
  J4a_3P: T3P + Bp -> T2P + Bp; k_1*T3P*Bp;
  J4a_3: T3 + Bp -> T2 + Bp; k_1*T3*Bp;
  J4b_4PR: T4PR + Bp -> T3PR + Bp; k_2*T4PR*Bp;
  J4b_4R: T4R + Bp -> T3R + Bp; k_2*T4R*Bp;
  J4b_4P: T4P + Bp -> T3P + Bp; k_2*T4P*Bp;
  J4b_4: T4 + Bp -> T3 + Bp; k_2*T4*Bp;
  J4c_L3PR: LT3PR + Bp -> LT2PR + Bp; k_3*LT3PR*Bp;
  J4c_L3R: LT3R + Bp -> LT2R + Bp; k_3*LT3R*Bp;
  J4c_L3P: LT3P + Bp -> LT2P + Bp; k_3*LT3P*Bp;
  J4c_L3: LT3 + Bp -> LT2 + Bp; k_3*LT3*Bp;
  J4d_L4PR: LT4PR + Bp -> LT3PR + Bp; k_4*LT4PR*Bp;
  J4d_L4R: LT4R + Bp -> LT3R + Bp; k_4*LT4R*Bp;
  J4d_L4P: LT4P + Bp -> LT3P + Bp; k_4*LT4P*Bp;
  J4d_L4: LT4 + Bp -> LT3 + Bp; k_4*LT4*Bp;
  J2_L2P: LT2PR -> LT2P + R; k1a*LT2PR;
  J2_L2: LT2R -> LT2 + R; k1a*LT2R;
  J2_L3P: LT3PR -> LT3P + R; k1a*LT3PR;
  J2_L3: LT3R -> LT3 + R; k1a*LT3R;
  J2_L4P: LT4PR -> LT4P + R; k1a*LT4PR;
  J2_L4: LT4R -> LT4 + R; k1a*LT4R;
  J2_2P: T2PR -> T2P + R; k1a*T2PR;
  J2_2: T2R -> T2 + R; k1a*T2R;
  J2_3P: T3PR -> T3P + R; k1a*T3PR;
  J2_3: T3R -> T3 + R; k1a*T3R;
  J2_4P: T4PR -> T4P + R; k1a*T4PR;
  J2_4: T4R -> T4 + R; k1a*T4R;
  J3_L2P: LT2P + R -> LT2PR; k1b*LT2P*R;
  J3_L2: LT2 + R -> LT2R; k1b*LT2*R;
  J3_L3P: LT3P + R -> LT3PR; k1b*LT3P*R;
  J3_L3: LT3 + R -> LT3R; k1b*LT3*R;
  J3_L4P: LT4P + R -> LT4PR; k1b*LT4P*R;
  J3_L4: LT4 + R -> LT4R; k1b*LT4*R;
  J3_2P: T2P + R -> T2PR; k1b*T2P*R;
  J3_2: T2 + R -> T2R; k1b*T2*R;
  J3_3P: T3P + R -> T3PR; k1b*T3P*R;
  J3_3: T3 + R -> T3R; k1b*T3*R;
  J3_4P: T4P + R -> T4PR; k1b*T4P*R;
  J3_4: T4 + R -> T4R; k1b*T4*R;
  J5_2PR: L + T2PR -> LT2PR; k5*L*T2PR;
  J5_2R: L + T2R -> LT2R; k5*L*T2R;
  J5_2P: L + T2P -> LT2P; k5*L*T2P;
  J5_2: L + T2 -> LT2; k5*L*T2;
  J5_3PR: L + T3PR -> LT3PR; k5*L*T3PR;
  J5_3R: L + T3R -> LT3R; k5*L*T3R;
  J5_3P: L + T3P -> LT3P; k5*L*T3P;
  J5_3: L + T3 -> LT3; k5*L*T3;
  J5_4PR: L + T4PR -> LT4PR; k5*L*T4PR;
  J5_4R: L + T4R -> LT4R; k5*L*T4R;
  J5_4P: L + T4P -> LT4P; k5*L*T4P;
  J5_4: L + T4 -> LT4; k5*L*T4;
  J6_2PR: LT2PR -> L + T2PR; k_5*LT2PR;
  J6_2R: LT2R -> L + T2R; k_5*LT2R;
  J6_2P: LT2P -> L + T2P; k_5*LT2P;
  J6_2: LT2 -> L + T2; k_5*LT2;
  J6_3PR: LT3PR -> L + T3PR; k_5*LT3PR;
  J6_3R: LT3R -> L + T3R; k_5*LT3R;
  J6_3P: LT3P -> L + T3P; k_5*LT3P;
  J6_3: LT3 -> L + T3; k_5*LT3;
  J6_4PR: LT4PR -> L + T4PR; k_5*LT4PR;
  J6_4R: LT4R -> L + T4R; k_5*LT4R;
  J6_4P: LT4P -> L + T4P; k_5*LT4P;
  J6_4: LT4 -> L + T4; k_5*LT4;
  J7_2R: T2R -> T2pR; k8*T2R;
  J7_2: T2 -> T2p; k8*T2;
  J7_3R: T3R -> T3pR; k9*T3R;
  J7_3: T3 -> T3p; k9*T3;
  J7_4R: T4R -> T4pR; k10*T4R;
  J7_4: T4 -> T4p; k10*T4;
  J7_L2R: LT2R -> LT2pR; k11*LT2R;
  J7_L2: LT2 -> LT2p; k11*LT2;
  J7_L3R: LT3R -> LT3pR; k12*LT3R;
  J7_L3: LT3 -> LT3p; k12*LT3;
  J7_L4R: LT4R -> LT4pR; k13*LT4R;
  J7_L4: LT4 -> LT4p; k13*LT4;
  J45: Bp -> B; k_b*Bp;
  J46: Yp + Z -> Y + Z; k_y*Yp*Z;
  J8_L2R: LT2pR + B -> LT2R + Bp; kb*LT2pR*B;
  J8_L2: LT2p + B -> LT2 + Bp; kb*LT2p*B;
  J8_L3R: LT3pR + B -> LT3R + Bp; kb*LT3pR*B;
  J8_L3: LT3p + B -> LT3 + Bp; kb*LT3p*B;
  J8_L4R: LT4pR + B -> LT4R + Bp; kb*LT4pR*B;
  J8_L4: LT4p + B -> LT4 + Bp; kb*LT4p*B;
  J8_2R: T2pR + B -> T2R + Bp; kb*T2pR*B;
  J8_2: T2p + B -> T2 + Bp; kb*T2p*B;
  J8_3R: T3pR + B -> T3R + Bp; kb*T3pR*B;
  J8_3: T3p + B -> T3 + Bp; kb*T3p*B;
  J8_4R: T4pR + B -> T4R + Bp; kb*T4pR*B;
  J8_4: T4p + B -> T4 + Bp; kb*T4p*B;
  J9_L2R: LT2pR + Y -> LT2R + Yp; ky*LT2pR*Y;
  J9_L2: LT2p + Y -> LT2 + Yp; ky*LT2p*Y;
  J9_L3R: LT3pR + Y -> LT3R + Yp; ky*LT3pR*Y;
  J9_L3: LT3p + Y -> LT3 + Yp; ky*LT3p*Y;
  J9_L4R: LT4pR + Y -> LT4R + Yp; ky*LT4pR*Y;
  J9_L4: LT4p + Y -> LT4 + Yp; ky*LT4p*Y;
  J9_2R: T2pR + Y -> T2R + Yp; ky*T2pR*Y;
  J9_2: T2p + Y -> T2 + Yp; ky*T2p*Y;
  J9_3R: T3pR + Y -> T3R + Yp; ky*T3pR*Y;
  J9_3: T3p + Y -> T3 + Yp; ky*T3p*Y;
  J9_4R: T4pR + Y -> T4R + Yp; ky*T4pR*Y;
  J9_4: T4p + Y -> T4 + Yp; ky*T4p*Y;
end
