// SBML level 3 version 1

model chemotaxis()

  // Compartments:
  compartment default_compartment = 1;

  // Species:
  species $x0 in default_compartment = 1;
  species L in default_compartment = 1.122687e-8;
  species T2pR in default_compartment = 9.956975e-9;
  species T3p in default_compartment = 2.21921e-8;
  species R in default_compartment = 1.201029e-10;
  species T2R in default_compartment = 2.789555e-7;
  species T3 in default_compartment = 2.072354e-7;
  species T3pR in default_compartment = 6.528009e-10;
  species T4p in default_compartment = 5.376306e-10;
  species T3R in default_compartment = 6.093363e-9;
  species T4 in default_compartment = 4.702127e-9;
  species LT2pR in default_compartment = 1.582556e-11;
  species LT3p in default_compartment = 1.253622e-10;
  species LT2R in default_compartment = 3.017032e-9;
  species LT3 in default_compartment = 2.660287e-9;
  species LT3pR in default_compartment = 3.463334e-12;
  species LT4p in default_compartment = 4.72209e-12;
  species LT3R in default_compartment = 7.177787e-11;
  species LT4 in default_compartment = 5.462766e-11;
  species Bp in default_compartment = 6.754401e-7;
  species T2p in default_compartment = 2.543034e-7;
  species T2 in default_compartment = 7.125367e-6;
  species T4pR in default_compartment = 2.192954e-10;
  species T4R in default_compartment = 1.917947e-9;
  species LT2p in default_compartment = 4.082326e-10;
  species LT2 in default_compartment = 8.244315e-8;
  species LT4pR in default_compartment = 1.910745e-12;
  species LT4R in default_compartment = 2.208385e-11;
  species B in default_compartment = 1.02456e-6;
  species Y in default_compartment = 1.396031e-5;
  species Yp in default_compartment = 6.039686e-6;
  species Z in default_compartment = 4e-5;

  // Parameters:
  k0 = 0;
  k1c = 0.17;
  k2c = 0.1*k1c;
  k3c = 30*k1c;
  k4c = 30*k2c;
  k_1 = 400000;
  k_2 = 30000;
  k_3 = k_1;
  k_4 = k_2;
  k1a = 1.7e-6/k1b;
  k1b = k5;
  k5 = 70000000;
  k_5 = 70;
  k8 = 15;
  k9 = 3*k8;
  k10 = 3.2*k8;
  k11 = 0;
  k12 = 1.1*k8;
  k13 = 0.72*k10;
  kb = 800000;
  ky = 30000000;
  k_b = 0.35;
  k_y = 500000;
  k2a = k1a;
  k2b = k1b;
  k3a = k1a;
  k3b = k1b;

  // Reactions:
  J0: $x0 -> L; k0*x0;
  J1_2pR: T2pR -> T3p + R; k1c*T2pR;
  J1_2R: T2R -> T3 + R; k1c*T2R;
  J1_3pR: T3pR -> T4p + R; k2c*T3pR;
  J1_3R: T3R -> T4 + R; k2c*T3R;
  J1_L2pR: LT2pR -> LT3p + R; k3c*LT2pR;
  J1_L2R: LT2R -> LT3 + R; k3c*LT2R;
  J1_L3pR: LT3pR -> LT4p + R; k4c*LT3pR;
  J1_L3R: LT3R -> LT4 + R; k4c*LT3R;
  J4a_3pR: T3pR + Bp -> T2pR + Bp; k_1*T3pR*Bp;
  J4a_3R: T3R + Bp -> T2R + Bp; k_1*T3R*Bp;
  J4a_3p: T3p + Bp -> T2p + Bp; k_1*T3p*Bp;
  J4a_3: T3 + Bp -> T2 + Bp; k_1*T3*Bp;
  J4b_4pR: T4pR + Bp -> T3pR + Bp; k_2*T4pR*Bp;
  J4b_4R: T4R + Bp -> T3R + Bp; k_2*T4R*Bp;
  J4b_4p: T4p + Bp -> T3p + Bp; k_2*T4p*Bp;
  J4b_4: T4 + Bp -> T3 + Bp; k_2*T4*Bp;
  J4c_L3pR: LT3pR + Bp -> LT2pR + Bp; k_3*LT3pR*Bp;
  J4c_L3R: LT3R + Bp -> LT2R + Bp; k_3*LT3R*Bp;
  J4c_L3p: LT3p + Bp -> LT2p + Bp; k_3*LT3p*Bp;
  J4c_L3: LT3 + Bp -> LT2 + Bp; k_3*LT3*Bp;
  J4d_L4pR: LT4pR + Bp -> LT3pR + Bp; k_4*LT4pR*Bp;
  J4d_L4R: LT4R + Bp -> LT3R + Bp; k_4*LT4R*Bp;
  J4d_L4p: LT4p + Bp -> LT3p + Bp; k_4*LT4p*Bp;
  J4d_L4: LT4 + Bp -> LT3 + Bp; k_4*LT4*Bp;
  J2_L2p: LT2pR -> LT2p + R; k1a*LT2pR;
  J2_L2: LT2R -> LT2 + R; k1a*LT2R;
  J2_L3p: LT3pR -> LT3p + R; k1a*LT3pR;
  J2_L3: LT3R -> LT3 + R; k1a*LT3R;
  J2_L4p: LT4pR -> LT4p + R; k1a*LT4pR;
  J2_L4: LT4R -> LT4 + R; k1a*LT4R;
  J2_2p: T2pR -> T2p + R; k1a*T2pR;
  J2_2: T2R -> T2 + R; k1a*T2R;
  J2_3p: T3pR -> T3p + R; k1a*T3pR;
  J2_3: T3R -> T3 + R; k1a*T3R;
  J2_4p: T4pR -> T4p + R; k1a*T4pR;
  J2_4: T4R -> T4 + R; k1a*T4R;
  J3_L2p: LT2p + R -> LT2pR; k1b*LT2p*R;
  J3_L2: LT2 + R -> LT2R; k1b*LT2*R;
  J3_L3p: LT3p + R -> LT3pR; k1b*LT3p*R;
  J3_L3: LT3 + R -> LT3R; k1b*LT3*R;
  J3_L4p: LT4p + R -> LT4pR; k1b*LT4p*R;
  J3_L4: LT4 + R -> LT4R; k1b*LT4*R;
  J3_2p: T2p + R -> T2pR; k1b*T2p*R;
  J3_2: T2 + R -> T2R; k1b*T2*R;
  J3_3p: T3p + R -> T3pR; k1b*T3p*R;
  J3_3: T3 + R -> T3R; k1b*T3*R;
  J3_4p: T4p + R -> T4pR; k1b*T4p*R;
  J3_4: T4 + R -> T4R; k1b*T4*R;
  J5_2pR: L + T2pR -> LT2pR; k5*L*T2pR;
  J5_2R: L + T2R -> LT2R; k5*L*T2R;
  J5_2p: L + T2p -> LT2p; k5*L*T2p;
  J5_2: L + T2 -> LT2; k5*L*T2;
  J5_3pR: L + T3pR -> LT3pR; k5*L*T3pR;
  J5_3R: L + T3R -> LT3R; k5*L*T3R;
  J5_3p: L + T3p -> LT3p; k5*L*T3p;
  J5_3: L + T3 -> LT3; k5*L*T3;
  J5_4pR: L + T4pR -> LT4pR; k5*L*T4pR;
  J5_4R: L + T4R -> LT4R; k5*L*T4R;
  J5_4p: L + T4p -> LT4p; k5*L*T4p;
  J5_4: L + T4 -> LT4; k5*L*T4;
  J6_2pR: LT2pR -> L + T2pR; k_5*LT2pR;
  J6_2R: LT2R -> L + T2R; k_5*LT2R;
  J6_2p: LT2p -> L + T2p; k_5*LT2p;
  J6_2: LT2 -> L + T2; k_5*LT2;
  J6_3pR: LT3pR -> L + T3pR; k_5*LT3pR;
  J6_3R: LT3R -> L + T3R; k_5*LT3R;
  J6_3p: LT3p -> L + T3p; k_5*LT3p;
  J6_3: LT3 -> L + T3; k_5*LT3;
  J6_4pR: LT4pR -> L + T4pR; k_5*LT4pR;
  J6_4R: LT4R -> L + T4R; k_5*LT4R;
  J6_4p: LT4p -> L + T4p; k_5*LT4p;
  J6_4: LT4 -> L + T4; k_5*LT4;
  J7_2R: T2R -> T2pR; k8*T2R;
  J7_2: T2 -> T2p; k8*T2;
  J7_3R: T3R -> T3pR; k9*T3R;
  J7_3: T3 -> T3p; k9*T3;
  J7_4R: T4R -> T4pR; k10*T4R;
  J7_4: T4 -> T4p; k10*T4;
  J7_L2R: LT2R -> LT2pR; k11*LT2R;
  J7_L2: LT2 -> LT2p; k11*LT2;
  J7_L3R: LT3R -> LT3pR; k12*LT3R;
  J7_L3: LT3 -> LT3p; k12*LT3;
  J7_L4R: LT4R -> LT4pR; k13*LT4R;
  J7_L4: LT4 -> LT4p; k13*LT4;
  J8_L2R: LT2pR + B -> LT2R + Bp; kb*LT2pR*B;
  J8_L2: LT2p + B -> LT2 + Bp; kb*LT2p*B;
  J8_L3R: LT3pR + B -> LT3R + Bp; kb*LT3pR*B;
  J8_L3: LT3p + B -> LT3 + Bp; kb*LT3p*B;
  J8_L4R: LT4pR + B -> LT4R + Bp; kb*LT4pR*B;
  J8_L4: LT4p + B -> LT4 + Bp; kb*LT4p*B;
  J8_2R: T2pR + B -> T2R + Bp; kb*T2pR*B;
  J8_2: T2p + B -> T2 + Bp; kb*T2p*B;
  J8_3R: T3pR + B -> T3R + Bp; kb*T3pR*B;
  J8_3: T3p + B -> T3 + Bp; kb*T3p*B;
  J8_4R: T4pR + B -> T4R + Bp; kb*T4pR*B;
  J8_4: T4p + B -> T4 + Bp; kb*T4p*B;
  J9_L2R: LT2pR + Y -> LT2R + Yp; ky*LT2pR*Y;
  J9_L2: LT2p + Y -> LT2 + Yp; ky*LT2p*Y;
  J9_L3R: LT3pR + Y -> LT3R + Yp; ky*LT3pR*Y;
  J9_L3: LT3p + Y -> LT3 + Yp; ky*LT3p*Y;
  J9_L4R: LT4pR + Y -> LT4R + Yp; ky*LT4pR*Y;
  J9_L4: LT4p + Y -> LT4 + Yp; ky*LT4p*Y;
  J9_2R: T2pR + Y -> T2R + Yp; ky*T2pR*Y;
  J9_2: T2p + Y -> T2 + Yp; ky*T2p*Y;
  J9_3R: T3pR + Y -> T3R + Yp; ky*T3pR*Y;
  J9_3: T3p + Y -> T3 + Yp; ky*T3p*Y;
  J9_4R: T4pR + Y -> T4R + Yp; ky*T4pR*Y;
  J9_4: T4p + Y -> T4 + Yp; ky*T4p*Y;
  J10: Bp -> B; k_b*Bp;
  J11: Yp + Z -> Y + Z; k_y*Yp*Z;

  // Events:
  _E0: at (time > 100): L = 1e-7;
end
