// SBML level 2 version 1
// This model was downloaded from BioModels Database
// http://www.ebi.ac.uk/biomodels-static/

model Field1974_Oregonator()
  // Field-Noyes Model of BZ Reaction
  // Citation
  // R.J.Field and R.M.Noyes,J.Chem.Phys.60,1877 (1974)
  // Description
  // Field Noyes Version of Belousov-Zhabotinsky Reaction. BrO3 is held constant; HOBr is typically ignored, and can be replaced by an empty-set. The stoichiometry f is typically taken as 1/2 or 1. .
  // Initially Generated by Cellerator Version 1.0 update 2.1220 using Mathematica 4.2 for Mac OS X (June 4, 2002), December 26, 2002 10:43:53, using (PowerMac,PowerPC, Mac OS X,MacOSX,Darwin). author=B.E.Shapiro
  // Modified with SBMLeditor by Nicolas Le Novère, to fit the original article.
  // To the extent possible under law, all copyright and related or neighbouring rights to this encoded model have been dedicated to the public domain worldwide. Please refer to CC0 Public Domain Dedication for more information.
  // In summary, you are entitled to use this encoded model in absolutely any manner you deem suitable, verbatim, or with modification, alone or embedded it in a larger context, redistribute it, commercially or not, in a restricted way or not.
  // To cite BioModels Database, please use: Li C, Donizelli M, Rodriguez N, Dharuri H, Endler L, Chelliah V, Li L, He E, Henry A, Stefan MI, Snoep JL, Hucka M, Le Novère N, Laibe C (2010) BioModels Database: An enhanced, curated and annotated resource for published quantitative kinetic models. BMC Syst Biol., 4:92.
  // biomodels.db:MODEL6622000424
  // biomodels.db:BIOMD0000000040
  // isDescribedBy doi:10.1063/1.1681288
  // hasTaxon taxonomy:131567
  // isVersionOf GO:0007622

  // Compartments:
  compartment BZ = 1;

  // Species:
  species Br in BZ = 1e-7; Br is "Br-";  // CHEBI:15858
  species $BrO3 in BZ = 0.06; BrO3 is "BrO3-";  // CHEBI:29223
  species Ce in BZ = 0.05; Ce is "Ce4+";
  species HBrO2 in BZ = 5e-11;
  species $HOBr in BZ = 0;

  // Parameters:
  f = 1;

  // Reactions:
  M1: Br + $BrO3 => HBrO2 + $HOBr; Br*BrO3*k1*BZ;
    k1 = 1.34;
  M2: Br + HBrO2 => 2 $HOBr; Br*HBrO2*k2*BZ;
    k2 = 1600000000;
  M3: $BrO3 + HBrO2 => Ce + 2 HBrO2; BrO3*HBrO2*k3*BZ;
    k3 = 8000;
  M4: 2 HBrO2 => $BrO3 + $HOBr; HBrO2^2*k4*BZ;
    k4 = 40000000;
  M5: Ce => f Br; Ce*k5*BZ;
    k5 = 1;
end
